// COMSOL Multiphysics 5.3.0.260 model "Cfibre_model_fin_RepdZ_cuff.mph"
// C 2DAxi sep2017
// Test 1axonC\n\n
// Outline of the model tree
// Components: comp2 "Component 2", comp3 "Component 3"
// Unit system: none

Parameters
  Cm = 1[uF/cm^2]
  gK = 36[mS/cm^2]  // delayed rectifier
  gNa = 106.6439[mS/mm^2]  // Nav1.7
  gL = 0.3[mS/cm^2]
  VNa = 55[mV]
  VK = -72[mV]
  VL = -50[mV]
  u0 = -60.15601065947658[mV]
  m0 = 0.0519668337743450
  n0 = 0.315288898076907
  h0 = 0.601566023917700
  Rmem = 2[kohm*cm^2]
  Rinsq = 0.2[kohm*cm]
  diam = 0.1[cm]
  roi = Rinsq/(pi*(diam/2)^2)[ohm/cm]
  lambda = sqrt(rom/roi)[cm]  // Space constant
  rom = Rmem/(pi*diam)[ohm*cm]
  sigmaNa = 10
  sigmaax = 1/Rinsq[mS/cm]
  K1 = diam/(4*(Rinsq+Rex))  // Spatial Coefficient
  eps0 = 8.85*10^(-8)[uF/cm]
  hm = 5*10^(-7)[cm]  // Membrane thickness, 5-10 nm everywhere!
  Rcyt = 0.03
  eNa = 80  // Epsilon of saline
  Rex = 1/sigmaNa
  K = diam/(4*(Rinsq))
  QNa = 1  // Na temperature coefficient, 2.5
  QK = 1  // 3.3
  Qh = 1  // 3
  gNa1.7 = 106.6439
  gNa1.8 = 242.7124
  gNa1.9 = 0.0948
  gPump = 0.0048
  gKdr = 18.0017
  gKa = 12.7555
  gHCN = 2.5377
  gKNa = 0.0012
  CNain = 11.4[mM]
  CNaout = 154[mM]
  CKin = 121.7[mM]
  CKout = 5.6[mM]
  coef = 8.31*T*1000/96485.33  // RT/F
  ENa1 = coef*log(CNaout/CNain)
  EK1 = coef*log(CKout/CKin)
  RiC = 35.4/1000[kOhm*cm]
  diamC = 1/10000[cm]  // 1um, 0.25um branch
  KC = diamC/(4*RiC)
  sigmaaxC = 1/RiC[mS/cm]
  m170 = 0.011697  // Activation gate
  m180 = 0.01089
  h170 = 0.111756  // Fast-inactivation gate 0.6
  h180 = 0.9966  // 0.6
  s170 = 8.37466*10^-7  // Slow inactivation gate
  s180 = 0.777
  u180 = 0.622  // Ultraslow inactivation gate
  V0 = -55  // Tigerholm
  m3hs17 = -2*10^-6 /(gNa1.7*(V0-ENa1))
  m3hsu18 = -19*10^-6 /(gNa1.8*(V0-ENa1))
  T = 273+tC[K]
  tC = 37
  m190 = 0.838194
  h190 = 0.004219  // 0.6
  s190 = 0.0001216
  ns0 = 0.0349
  nf0 = 0.0349
  IpumpK1 = gPump/((1+1/CKout)^2) * (1.62/(1+(6.7/(CNain+8))^3) + 1/(1+(67.6/(CNain+8))^3))
  Ipump1 = IpumpNa1+IpumpK1
  IpumpNa1 = -1.5*IpumpK1
  eee = (m170^3)*s170*h170
  ee1 = m180^3*h180
  Ih0 = -4313*10^-6/(0.25*gHCN*(2*V0+ENa1+EK1))
  IK0 = sqrt(sqrt(116*10^-6/(gKdr*(V0-EK1))))
  gKLeaks = -(116-2*2728)*10^-6
  n01 = 0.3431  // ninf(V0)
  df = 3^(0.1*37-0.63)
  gKA = 12.75555
  na0 = 1.36817*10^-4
  ha0 = 0.104128
  kNa = 2.5^((T-273-22)/10)
  kK = 3.3^((T-273-22)/10)
  kh = 3^((T-273-22)/10)  // Qh = 3, Ih at room temperature (kouranova 2008)
  Eh = -30  // Kouranova et al
  gKNa11 = gKNa/(1+(38.7/CNain)^3.5)
  gKM = 6.9733
  theta = 0.029/10000  // periaxonal space, 29nm
  DNa = 0.1*10^-7[cm/ms]  // 0.1um/s
  DK = 0.1*10^-7
  Vpax = pi*theta*(diamC+theta)[cm^3]
  Vin = pi*(diamC/2)^2
  D = 1.5*10^-5
  Sax = 1*pi*(diamC/2)*1
  fr = 0  // EIT frequency
  Iamp = 20  // uA/cm^2
  ph = 0
  geom = 0
  geom2 = 0
  TolR = 0.1*0.0001
  Mesh_N = 1600
  Rel = 0.0005
  Hel = 0.0005
  F = 96485
  n = 2
  Rgas = 8.31
  I0 = 6.41*10^-4
  T0 = 298
  Kres = 1.57
  beta = 0.91
  fstim = 10
  Tmax = 300
  Tmaxcalc = 1000

Functions
  an1: Analytic | funcname = am17; expr = 15.5 / (1+exp((u-5)/(-12.08))) [1/s]; args = u
  an2: Analytic | funcname = bm17; expr = 35.2 / (1+exp((u+72.7)/16.7)) [1/s]; args = u
  an3: Analytic | funcname = as17; expr = 0.00003 + 0.00092 / (1+exp((u+93.9)/16.6)); args = u
  an4: Analytic | funcname = bs17; expr = 132.05 -132.05 / (1+exp((u-384.9)/28.5)); args = u
  an5: Analytic | funcname = ah17; expr = 0.38675 / (1+exp((u+122.35)/15.29)); args = u
  an6: Analytic | funcname = bh17; expr = -0.00283 + 2.00283/(1+exp((u+5.5266)/(-12.70195))); args = u
  gp1: GaussianPulse | location = 2; sigma = 0.4
  rect1: Rectangle | lower = 0.5; upper = 0.6; smooth = 0.01
  an68: Analytic | funcname = INa17_1; expr = gNa1.7*(m17^3)*h17*s17*(u-ENa(Nasp, Nain)); args = {u, m17, h17, s17, Nasp, Nain}
  an67: Analytic | funcname = INa18_1; expr = gNa1.8*(m18^3)*h18*s18*u18*(u-ENa(Nasp, Nain)); args = {u, m18, h18, s18, u18, Nasp, Nain}
  an69: Analytic | funcname = INa19_1; expr = gNa1.9*m19*h19*s19*(u-ENa(Nasp, Nain)); args = {u, m19, h19, s19, Nasp, Nain}
  an10: Analytic | funcname = am18; expr = 2.85 - 2.839 / (1+exp((u-1.159)/13.95)) [1/s]; args = u
  an11: Analytic | funcname = bm18; expr = 7.6205 / (1+exp((u+46.463)/8.8289)) [1/s]; args = u
  an12: Analytic | funcname = as18; expr = 0.001*5.4203 / (1+exp((u+79.816)/16.269)); args = u
  an13: Analytic | funcname = bs18; expr = 0.001*5.0757 / (1+exp(-(u+15.968)/11.542)); args = u
  an14: Analytic | funcname = au18; expr = 0.0002*2.0434 / (1+exp((u+67.499)/19.51)); args = u
  an15: Analytic | funcname = bu18; expr = 0.0002*1.9952/(1+exp(-(u+30.963)/14.792)); args = u
  an21: Analytic | funcname = th18; expr = (1.218+42.043*exp(-( (u+38.1)^2 ) / ( 2*15.19^2 ) )); args = u
  an22: Analytic | funcname = hinf18; expr = 1/( 1+exp((u+32.2)/4) ); args = u
  an23: Analytic | funcname = sinf18; expr = 1/( 1+exp((u+45)/8) ); args = u
  an24: Analytic | funcname = uinf18; expr = 1/( 1+exp((u+51)/8) ); args = u
  an25: Analytic | funcname = am19; expr = 1.032 / (1+exp((u+6.99)/(-14.87115))) [1/s]; args = u
  an26: Analytic | funcname = bm19; expr = 5.79 / (1+exp((u+130.4)/22.9)) [1/s]; args = u
  an27: Analytic | funcname = ah19; expr = 0.06435 / (1+exp((u+73.26415)/3.71928)); args = u
  an28: Analytic | funcname = bh19; expr = 0.13496/(1+exp((u+10.27853)/(-9.09334))); args = u
  an29: Analytic | funcname = as19; expr = 0.00000016 * (exp(-u/12)); args = u
  an30: Analytic | funcname = bs19; expr = 0.0005 / (1+exp(-(u+32)/23)); args = u
  an46: Analytic | funcname = IK; expr = gKdr*(n^4)*(u-EK(Ksp, Kin)); args = {u, n, Ksp, Kin}
  an34: Analytic | funcname = ninfK; expr = 1/( 1+exp(-(u+35+10)/15.4) ); args = u
  an38: Analytic | funcname = Ih; expr = (IhNa(u,ns,nf,Nasp,Nain)+IhK(u,ns,nf,Ksp, Kin)); args = {u, ns, nf, Nasp, Nain, Ksp, Kin}
  an47: Analytic | funcname = IhNa; expr = 0.5*gHCN*(0.5*ns+0.5*nf) * (u+ENa(Nasp,Nain)); args = {u, ns, nf, Nasp, Nain}
  an48: Analytic | funcname = IhK; expr = 0.5*gHCN*(0.5*ns+0.5*nf) * (u+EK(Ksp, Kin)); args = {u, ns, nf, Ksp, Kin}
  an39: Analytic | funcname = ninfh; expr = 1/(1+exp((u+87.2)/9.7)); args = u
  an51: Analytic | funcname = IpumpK; expr = gPump/((1+1/Ksp)^2) - (1.62/(1+(6.7/(Nain+8))^3) + 1/(1+(67.6/(Nain+8))^3)); args = {Ksp, Nain}
  an74: Analytic | funcname = IpumpNa; expr = -1.5*IpumpK(Ksp, Nain); args = {Ksp, Nain}
  an50: Analytic | funcname = Ipump; expr = IpumpK(Ksp, Nain)+IpumpNa(Ksp, Nain); args = {Ksp, Nain}
  an75: Analytic | funcname = ENa; expr = coef*log(Nasp/Nain); args = {Nasp, Nain}
  an76: Analytic | funcname = EK; expr = coef*log(Ksp/Kin); args = {Ksp, Kin}
  pw1: Piecewise | funcname = ths; arg = u; extrap = interior; pieces = {{-400, -70, 2500 + 100 * exp((u+240)/50)}, {-70, 150, 300 + 542 * exp((u+25)/(-20))}}
  pw2: Piecewise | funcname = thf; arg = u; extrap = interior; pieces = {{-400, -70, 250 + 12 * exp((u+240)/50)}, {-70, 150, 140 + 50 * exp((u+25)/(-20))}}
  pw3: Piecewise
    funcname = tK
    arg = u
    extrap = interior
    pieces = 
      {-400, -31, 1000 * ( 0.000688+1/( exp((u+75.2)/6.5) + exp((u-131.5)/(-34.8)) ) )}
      {-31, 150, 0.16 + 0.8 * exp(-0.0267*(u+11))}
  an61: Analytic | funcname = IKA; expr = gKA*na*ha*(u-EK(Ksp, Kin)); args = {u, na, ha, Ksp, Kin}
  an62: Analytic | funcname = ninfA; expr = (1/(1+exp(-(u+5.4+15)/16.4)))^4; args = u
  an63: Analytic | funcname = tnA; expr = 0.25+10.04*exp(-((u+24.67)^2)/(2*34.8^2)); args = u
  an64: Analytic | funcname = hinfA; expr = 1/(1+exp((u+49.9+15)/4.6)); args = u
  an65: Analytic | funcname = thA; expr = 20+50*exp(-((u+40)^2)/(2*40^2)); args = u
  an70: Analytic | funcname = IKM; expr = gKM*(nsm/4 + 3*nfm/4)*(u-EK(Ksp, Kin)); args = {u, nsm, nfm, Ksp, Kin}
  pw4: Piecewise | funcname = tms; arg = u; extrap = interior; pieces = {{-400, -60, 219}, {-60, 150, 13*u+1000}}
  an71: Analytic | funcname = ninfM; expr = 1/(1+exp(-(u+30)/6)); args = u
  an72: Analytic | funcname = tmf; expr = 1/(0.00395*(exp((u+30)/40)+exp(-(u+30)/20))); args = u
  an60: Analytic | funcname = ILeaks; expr = ILeaksK(u, Nasp, Nain, Ksp, Kin) + ILeaksNa(u, Ksp, Kin, Nasp, Nain); args = {u, Ksp, Kin, Nasp, Nain}
  an77: Analytic
    funcname = ILeaksK
    expr = -(IK(V0,ninfK(V0),CKout,CKin)+IKA(V0,ninfA(V0),hinfA(V0),CKout,CKin)+IhK(V0,ninfh(V0),ninfh(V0),CKout,CKin)+IKM(V0,ninfM(V0),ninfM(V0),CKout,CKin)+gKNa1(Nain)*(V0-EK(Ksp, Kin))+IpumpK(CKout,CNain))*(u-EK(Ksp, Kin))/(V0_var(Ksp, Nasp, Kin, Nain)-EK(Ksp, Kin))
    args = {u, Nasp, Nain, Ksp, Kin}
  an78: Analytic
    funcname = ILeaksNa
    expr = - (INa17_1(V0,am17(V0)/(am17(V0)+bm17(V0)),ah17(V0)/(ah17(V0)+bh17(V0)),as17(V0)/(as17(V0)+bs17(V0)),CNaout,CNain)+INa18_1(V0,am18(V0)/(am18(V0)+bm18(V0)), hinf18(V0), sinf18(V0), uinf18(V0),CNaout,CNain)+INa19_1(V0,am19(V0)/(am19(V0)+bm19(V0)),ah19(V0)/(ah19(V0)+bh19(V0)),as19(V0)/(as19(V0)+bs19(V0)),CNaout,CNain)+IhNa(V0,ninfh(V0),ninfh(V0),CNaout,CNain)+IpumpNa(CKout,CNain))*(u-ENa(Nasp, Nain))/(V0_var(Ksp, Nasp, Kin, Nain)-ENa(Nasp, Nain))
    args = {u, Ksp, Kin, Nasp, Nain}
  an79: Analytic | funcname = gKNa1; expr = gKNa/(1+(38.7/Nain)^3.5); args = Nain
  rect2: Rectangle | upper = Tmax - 5; smooth = 0.01
  an80: Analytic | funcname = V0_var; expr = (8.31*T*1000/F)*log((1.5*Ksp+0.1*Nasp)/(1.5*Kin+0.1*Nain)); args = {Ksp, Nasp, Kin, Nain}
  step1: Step | location = 10; smooth = 0.01
  an81: Analytic | funcname = rect_periodic0; expr = rect1(t); args = t; periodic = on; periodicupper = 1000/fstim
  an83: Analytic | funcname = rect_rest; expr = rect2(t); args = t; periodic = on; periodicupper = 2000 + Tmax
  an82: Analytic | funcname = rect_periodic_rest; expr = rect_periodic0(t)*rect_rest(t); args = t; periodicupper = 1000/fstim

Couplings
  linext3: LinearExtrusion on boundaries 3
    opname = linext
    srcvertex1 = points 2
    srcvertex2 = points 3
    dstvertex1 = boundaries 1
    dstvertex2 = boundaries 5
    dstgeom = geom2
    srcmap = {r, z}
  linext4: LinearExtrusion on all domains
    opname = linext
    srcvertex1 = boundaries 1
    srcvertex2 = boundaries 5
    dstvertex1 = points 2
    dstvertex2 = points 3
    dstgeom = geom3
    srcmap = x

Probes
  bnd3: Boundary "Boundary Probe 3" [comp3] on boundaries 11 | expr = u3; unit = 1; descr = EAP RecEl; axisym = 2d
  pdom1: DomainPoint "Domain Point Probe 1" [comp2] (disabled) | frame = mesh; bndsnap1 = on; coords = 0.2
    ppb1: PointExpr "Point Probe Expression 1" | expr = u; unit = 1; descr = Dependent variable u
  bnd6: Boundary "Boundary Probe 6" [comp3] on boundaries 11
    expr = u5
    unit = 1
    descr = EAP RecEl noI
    axisym = 2d
    table = default
  var2: GlobalVariable "Global Variable Probe 2" [comp3] | expr = bnd3-bnd6; unit = 1

Geometry
  geom2 "Geometry 2" [comp2] (1D, length unit m)
    i1: Interval | intervals = many; p2 = 2; p = 0, 0.1,0.2, 1.9, 2
    fin: Finalize "Form Union"
  geom3 "Geometry 3" [comp3] (2D axisymmetric, length unit m)
    r1: Rectangle | pos = {(Rel-diamC/2)/2 + diamC/2, 1}; base = center; size = {Rel-diamC/2, 2.02}
    ls1: LineSegment | specify1 = coord; coord1 = {diamC/2, 0}; specify2 = coord; coord2 = {diamC/2, 2}
    ls2: LineSegment | specify1 = coord; coord1 = {Rel, 0.769}; specify2 = coord; coord2 = {Rel, 0.769 + Hel}
    ls3: LineSegment | specify1 = coord; coord1 = {Rel, 0.78 + geom}; specify2 = coord; coord2 = {Rel, 0.78 + Hel + geom}
    ls4: LineSegment
      specify1 = coord
      coord1 = {Rel, 0.782 + geom + geom2}
      specify2 = coord
      coord2 = {Rel, 0.782 + Hel + geom + geom2}
    r2: Rectangle | pos = {Rel, 0.4}; size = {50*(Rel-diamC/2), 0.36}
    r3: Rectangle | pos = {Rel, 0.79}; size = {50*(Rel-diamC/2), 1}
    fin: Finalize "Form Union"

Physics
  g2: GeneralFormPDE [comp2] on all domains
    dependent variable u2 = {u, s18, u18, n, ns, nf, na, ha, m18, h18, m17, h17, s17, m19, h19, s19, nsm, nfm, Ksp, Nasp, Kin, Nain}
    gfeq1: GeneralFormPDE (default)
      f = {- (INa17_1(u,m17,h17,s17,Nasp, Nain) + INa18_1(u,m18,h18,s18,u18,Nasp, Nain)+ INa19_1(u,m19,h19,s19,Nasp, Nain)+IK(u,n,Ksp,Kin) +IKM(u,nsm,nfm,Ksp,Kin)+IKA(u,na,ha,Ksp,Kin)+Ih(u,ns,nf,Nasp, Nain, Ksp, Kin)+ Ipump(Ksp, Nain)+ ILeaks(u, Ksp, Kin, Nasp, Nain)+gKNa1(Nain)*(u-EK(Ksp, Kin)) ), kNa*(sinf18(u) - s18)*(as18(u)+bs18(u))/QNa, kNa*(uinf18(u) - u18)*(au18(u)+bu18(u))/QNa, kK*(ninfK(u) - n)/tK(u), kh*(ninfh(u) - ns)/ths(u), kh*(ninfh(u) - nf)/thf(u), kK*(ninfA(u)-na)/tnA(u), kK*(hinfA(u)-ha)/thA(u), kNa*(am18(u)/(am18(u)+bm18(u)) - m18)*(am18(u)+bm18(u))/QNa, kNa*(hinf18(u) - h18)/th18(u), kNa*(am17(u)/(am17(u)+bm17(u)) - m17)*(am17(u)+bm17(u))/QNa, kNa*(ah17(u)/(ah17(u)+bh17(u)) - h17)*(ah17(u)+bh17(u))/QNa, kNa*(as17(u)/(as17(u)+bs17(u)) - s17)*(as17(u)+bs17(u))/QNa, kNa*(am19(u)/(am19(u)+bm19(u)) - m19)*(am19(u)+bm19(u))/QNa, kNa*(ah19(u)/(ah19(u)+bh19(u)) - h19)*(ah19(u)+bh19(u))/QNa, kNa*(as19(u)/(as19(u)+bs19(u)) - s19)*(as19(u)+bs19(u))/QNa, kK*(ninfM(u) - nsm)/tms(u), kK*(ninfM(u) - nfm)/tmf(u), (-(10^(-3))*(-IpumpK(Ksp, Nain)-(IK(u,n,Ksp,Kin) +IKM(u,nsm,nfm,Ksp,Kin)+IKA(u,na,ha,Ksp,Kin)+IhK(u,ns,nf, Ksp, Kin)+gKNa1(Nain)*(u-EK(Ksp, Kin)) +ILeaksK(u, Nasp, Nain, Ksp, Kin)))/96485.33 - DK*(Ksp-CKout))/theta, (-(10^(-3))*(-IpumpNa(Ksp, Nain)-(INa17_1(u,m17,h17,s17,Nasp, Nain) + INa18_1(u,m18,h18,s18,u18,Nasp, Nain)+ INa19_1(u,m19,h19,s19,Nasp, Nain)+IhNa(u,ns,nf,Nasp, Nain)+ILeaksNa(u, Ksp, Kin, Nasp, Nain)))/96485.33 - DNa*(Nasp-CNaout))/theta, -10^(-3)*2*(IK(u,n,Ksp,Kin) +IKM(u,nsm,nfm,Ksp,Kin)+IKA(u,na,ha,Ksp,Kin)+IhK(u,ns,nf, Ksp, Kin)+gKNa1(Nain)*(u-EK(Ksp, Kin))+IpumpK(Ksp, Nain)+ILeaksK(u, Nasp, Nain, Ksp, Kin))/(96485.33*(diamC/2)), -10^(-3)*2*(INa17_1(u,m17,h17,s17,Nasp, Nain) + INa18_1(u,m18,h18,s18,u18,Nasp, Nain)+ INa19_1(u,m19,h19,s19,Nasp, Nain)+IhNa(u,ns,nf,Nasp, Nain)+IpumpNa(Ksp, Nain)+ILeaksNa(u, Ksp, Kin, Nasp, Nain))/(96485.33*(diamC/2))}
      Ga = {-KC*ux-(KC*comp3.linext(u3z)-KC*comp3.linext(u5z)), 0, 0, 0, 0, 0, 0, 0, 0, 0, 0, 0, 0, 0, 0, 0, 0, 0, 0, 0, 0, 0}
      da = {Cm, 0, 0, 0, 0, 0, 0, 0, 0, 0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}
    zflx1: ZeroFluxBoundary "Zero Flux 1" (default)
    init1: init "Initial Values 1" (default)
      u = V0
      s18 = sinf18(V0)
      u18 = uinf18(V0)
      n = ninfK(V0)
      ns = ninfh(V0)
      nf = ninfh(V0)
      na = ninfA(V0)
      ha = hinfA(V0)
      m18 = am18(V0)/(am18(V0)+bm18(V0))
      h18 = hinf18(V0)
      m17 = am17(V0)/(am17(V0)+bm17(V0))
      h17 = ah17(V0)/(ah17(V0)+bh17(V0))
      s17 = as17(V0)/(as17(V0)+bs17(V0))
      m19 = am19(V0)/(am19(V0)+bm19(V0))
      h19 = ah19(V0)/(ah19(V0)+bh19(V0))
      s19 = as19(V0)/(as19(V0)+bs19(V0))
      nsm = ninfM(V0)
      nfm = ninfM(V0)
      Ksp = CKout
      Nasp = CNaout
      Kin = CKin
      Nain = CNain
    src2: SourceTerm "Source 2" on domains 1
      f = {600*rect_periodic_rest(t), 0, 0, 0, 0, 0, 0, 0, 0, 0, 0, 0, 0, 0, 0, 0, 0, 0, 0, 0, 0, 0}
    src3: SourceTerm "Source 3" (disabled) on domains 2
      f = {90*rect1(t), 0, 0, 0, 0, 0, 0, 0, 0, 0, 0, 0, 0, 0, 0, 0, 0, 0, 0, 0, 0, 0}
    src4: SourceTerm "Source 4" on domains 4
      f = {600*rect_periodic_rest(t), 0, 0, 0, 0, 0, 0, 0, 0, 0, 0, 0, 0, 0, 0, 0, 0, 0, 0, 0, 0, 0}
  g21: GeneralFormPDE [comp2] on all domains
    dependent variable u3 = {u2, s182, u182, n2, ns2, nf2, na2, ha2, m182, h182, m172, h172, s172, m192, h192, s192, nsm2, nfm2, Ksp2, Nasp2, Kin2, Nain2}
    gfeq1: GeneralFormPDE (default)
      f = {- (INa17_1(u2,m172,h172,s172,Nasp2, Nain2) + INa18_1(u2,m182,h182,s182,u182,Nasp2, Nain2)+ INa19_1(u2,m192,h192,s192,Nasp2, Nain2)+IK(u2,n2,Ksp2,Kin2) +IKM(u2,nsm2,nfm2,Ksp2,Kin2)+IKA(u2,na2,ha2,Ksp2,Kin2)+Ih(u2,ns2,nf2,Nasp2, Nain2, Ksp2, Kin2)+ Ipump(Ksp2, Nain2)+ ILeaks(u2, Ksp2, Kin2, Nasp2, Nain2)+gKNa1(Nain2)*(u2-EK(Ksp2, Kin2)) ), kNa*(sinf18(u2) - s182)*(as18(u2)+bs18(u2))/QNa, kNa*(uinf18(u2) - u182)*(au18(u2)+bu18(u2))/QNa, kK*(ninfK(u2) - n2)/tK(u2), kh*(ninfh(u2) - ns2)/ths(u2), kh*(ninfh(u2) - nf2)/thf(u2), kK*(ninfA(u2)-na2)/tnA(u2), kK*(hinfA(u2)-ha2)/thA(u2), kNa*(am18(u2)/(am18(u2)+bm18(u2)) - m182)*(am18(u2)+bm18(u2))/QNa, kNa*(hinf18(u2) - h182)/th18(u2), kNa*(am17(u2)/(am17(u2)+bm17(u2)) - m172)*(am17(u2)+bm17(u2))/QNa, kNa*(ah17(u2)/(ah17(u2)+bh17(u2)) - h172)*(ah17(u2)+bh17(u2))/QNa, kNa*(as17(u2)/(as17(u2)+bs17(u2)) - s172)*(as17(u2)+bs17(u2))/QNa, kNa*(am19(u2)/(am19(u2)+bm19(u2)) - m192)*(am19(u2)+bm19(u2))/QNa, kNa*(ah19(u2)/(ah19(u2)+bh19(u2)) - h192)*(ah19(u2)+bh19(u2))/QNa, kNa*(as19(u2)/(as19(u2)+bs19(u2)) - s192)*(as19(u2)+bs19(u2))/QNa, kK*(ninfM(u2) - nsm2)/tms(u2), kK*(ninfM(u2) - nfm2)/tmf(u2), (-(10^(-3))*(-IpumpK(Ksp2, Nain2)-(IK(u2,n2,Ksp2,Kin2) +IKM(u2,nsm2,nfm2,Ksp2,Kin2)+IKA(u2,na2,ha2,Ksp2,Kin2)+IhK(u2,ns2,nf2, Ksp2, Kin2)+gKNa1(Nain2)*(u2-EK(Ksp2, Kin2)) +ILeaksK(u2, Nasp2, Nain2, Ksp2, Kin2)))/96485.33 - DK*(Ksp2-CKout))/theta, (-(10^(-3))*(-IpumpNa(Ksp2, Nain2)-(INa17_1(u2,m172,h172,s172,Nasp2, Nain2) + INa18_1(u2,m182,h182,s182,u182,Nasp2, Nain2)+ INa19_1(u2,m192,h192,s192,Nasp2, Nain2)+IhNa(u2,ns2,nf2,Nasp2, Nain2)+ILeaksNa(u2, Ksp2, Kin2, Nasp2, Nain2)))/96485.33 - DNa*(Nasp2-CNaout))/theta, -10^(-3)*2*(IK(u2,n2,Ksp2,Kin2) +IKM(u2,nsm2,nfm2,Ksp2,Kin2)+IKA(u2,na2,ha2,Ksp2,Kin2)+IhK(u2,ns2,nf2, Ksp2, Kin2)+gKNa1(Nain2)*(u2-EK(Ksp2, Kin2))+IpumpK(Ksp2, Nain2)+ILeaksK(u2, Nasp2, Nain2, Ksp2, Kin2))/(96485.33*(diamC/2)), -10^(-3)*2*(INa17_1(u2,m172,h172,s172,Nasp2, Nain2) + INa18_1(u2,m182,h182,s182,u182,Nasp2, Nain2)+ INa19_1(u2,m192,h192,s192,Nasp2, Nain2)+IhNa(u2,ns2,nf2,Nasp2, Nain2)+IpumpNa(Ksp2, Nain2)+ILeaksNa(u2, Ksp2, Kin2, Nasp2, Nain2))/(96485.33*(diamC/2))}
      Ga = {-KC*u2x, 0, 0, 0, 0, 0, 0, 0, 0, 0, 0, 0, 0, 0, 0, 0, 0, 0, 0, 0, 0, 0}
      da = {Cm, 0, 0, 0, 0, 0, 0, 0, 0, 0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}
    zflx1: ZeroFluxBoundary "Zero Flux 1" (default)
    init1: init "Initial Values 1" (default)
      u2 = V0
      s182 = sinf18(V0)
      u182 = uinf18(V0)
      n2 = ninfK(V0)
      ns2 = ninfh(V0)
      nf2 = ninfh(V0)
      na2 = ninfA(V0)
      ha2 = hinfA(V0)
      m182 = am18(V0)/(am18(V0)+bm18(V0))
      h182 = hinf18(V0)
      m172 = am17(V0)/(am17(V0)+bm17(V0))
      h172 = ah17(V0)/(ah17(V0)+bh17(V0))
      s172 = as17(V0)/(as17(V0)+bs17(V0))
      m192 = am19(V0)/(am19(V0)+bm19(V0))
      h192 = ah19(V0)/(ah19(V0)+bh19(V0))
      s192 = as19(V0)/(as19(V0)+bs19(V0))
      nsm2 = ninfM(V0)
      nfm2 = ninfM(V0)
      Ksp2 = CKout
      Nasp2 = CNaout
      Kin2 = CKin
      Nain2 = CNain
    src2: SourceTerm "Source 2" on domains 1
      f = {600*rect_periodic_rest(t), 0, 0, 0, 0, 0, 0, 0, 0, 0, 0, 0, 0, 0, 0, 0, 0, 0, 0, 0, 0, 0}
    src3: SourceTerm "Source 3" (disabled) on domains 2
      f = {90*rect1(t), 0, 0, 0, 0, 0, 0, 0, 0, 0, 0, 0, 0, 0, 0, 0, 0, 0, 0, 0, 0, 0}
    src4: SourceTerm "Source 4" on domains 4
      f = {600*rect_periodic_rest(t), 0, 0, 0, 0, 0, 0, 0, 0, 0, 0, 0, 0, 0, 0, 0, 0, 0, 0, 0, 0, 0}
  g4: GeneralFormPDE [comp3] on all domains
    dependent variable u3
    gfeq1: GeneralFormPDE (default) | f = sigmaNa*u3r/r; Ga = {-sigmaNa*u3r, -sigmaNa*u3z}; da = 0
    zflx1: ZeroFluxBoundary "Zero Flux 1" (default)
    init1: init "Initial Values 1" (default)
    flux1: FluxBoundary "Flux/Source 1" on boundaries 13 | g = 100*Iamp*(0.0005/Hel)*cos((fr/1000)*2*pi*t+ph*pi/2); q = 0
    flux2: FluxBoundary "Flux/Source 2" on boundaries 15 | g = -100*Iamp*(0.0005/Hel)*cos((fr/1000)*2*pi*t+ph*pi/2); q = 0
    dir1: DirichletBoundary "Dirichlet Boundary Condition 1" on boundaries 5 | r = 0
    flux3: FluxBoundary "Flux/Source 3" on boundaries 3
      g = comp2.linext(Cm*d(u,t) + (INa17_1(u,m17,h17,s17,Nasp, Nain) + INa18_1(u,m18,h18,s18,u18,Nasp, Nain)+ INa19_1(u,m19,h19,s19,Nasp, Nain)+IK(u,n,Ksp,Kin) +IKM(u,nsm,nfm,Ksp,Kin)+IKA(u,na,ha,Ksp,Kin)+Ih(u,ns,nf,Nasp, Nain, Ksp, Kin)+ Ipump(Ksp, Nain)+ ILeaks(u, Ksp, Kin, Nasp, Nain)+gKNa1(Nain)*(u-EK(Ksp, Kin)) ) )
  g5: GeneralFormPDE [comp3] on all domains
    dependent variable u5
    gfeq1: GeneralFormPDE (default) | f = sigmaNa*u5r/r; Ga = {-sigmaNa*u5r, -sigmaNa*u5z}; da = 0
    zflx1: ZeroFluxBoundary "Zero Flux 1" (default)
    init1: init "Initial Values 1" (default)
    dir1: DirichletBoundary "Dirichlet Boundary Condition 1" on boundaries 5 | r = 0
    flux3: FluxBoundary "Flux/Source 3" on boundaries 3
      g = comp2.linext(Cm*d(u2,t) +INa17_1(u2,m172,h172,s172,Nasp2, Nain2) + INa18_1(u2,m182,h182,s182,u182,Nasp2, Nain2)+ INa19_1(u2,m192,h192,s192,Nasp2, Nain2)+IK(u2,n2,Ksp2,Kin2) +IKM(u2,nsm2,nfm2,Ksp2,Kin2)+IKA(u2,na2,ha2,Ksp2,Kin2)+Ih(u2,ns2,nf2,Nasp2, Nain2, Ksp2, Kin2)+ Ipump(Ksp2, Nain2)+ ILeaks(u2, Ksp2, Kin2, Nasp2, Nain2)+gKNa1(Nain2)*(u2-EK(Ksp2, Kin2)) )

Mesh
  mesh2 "Mesh 2" [geom2]
    size: MeshSizeDefault | hauto = 4
    edg1: Edge on remaining entities
      dis1: Distribution on domains 3 | numelem = 1.7*Mesh_N/2
      dis2: Distribution on domains 1 | numelem = 0.1*Mesh_N/2
      dis3: Distribution on domains 2 | numelem = 0.1*Mesh_N/2
      dis4: Distribution on domains 4 | numelem = 0.1*Mesh_N/2
  mesh3 "Mesh 3" [geom3]
    size: MeshSizeDefault | hmax = 0.135; hmin = 6.06E-4; hcurve = 0.3; hgrad = 1.3
    ftri1: FreeTri "Free Triangular 1" on remaining entities
      size1: Size on entire geometry
      dis1: Distribution on boundaries 3 | numelem = Mesh_N
      dis3: Distribution on boundaries 1 | numelem = 8
      dis4: Distribution on boundaries 4 | numelem = 8

Studies
  std1 "Study 1"
    batsw: BatchSweep (disabled)
      pname = {fstim, Tmax, Tmaxcalc}
      plistarr = {50 20 10, 250 750 2500, 600 2000 4000}
      punit = {, , }
      accumtable = new
      batchfile = C_TRAINS_dZ_CUFF_july21.mph
      synchsolutions = on
      clustersettings = on
      batchdir = E:\COMSOL
    time: Transient "Time Dependent" | tlist = range(0,0.1,Tmaxcalc); usertol = on; rtol = 0.0001

Solver configurations
  sol1 "Solution 1" (study std1)
    v1: Variables "Dependent Variables 1"
    t1: Time "Time-Dependent Solver 1"
      dDef: Direct
      fcDef: FullyCoupled

Datasets
  dset1: Solution | solution = sol1
  dset2: Solution | solution = sol1